<?xml version="1.0" encoding="UTF-8"?>

<!-- ########################################

 # DR400-jsbSim by PAF team
 # modified for Ecoflyer by D-ECHO
 # April 2012 : Modified by PAF team
 # http://equipe-flightgear.forumactif.com

##########################################-->

<piston_engine name="Continental-CD-135">
  <minmp unit="INHG">          11.5 </minmp>
  <maxmp unit="INHG">         30.0 </maxmp>
  <cylinders>                    4 </cylinders>
  <displacement unit="IN3">  121.5 </displacement>
  <bore unit="IN">           3.26 </bore>
  <stroke unit="IN">         3.62 </stroke>
  <cycles>                     4.0 </cycles>
  <idlerpm>                  890.0 </idlerpm>
  <maxrpm>                  2300.0 </maxrpm>
  <maxhp>                      135 </maxhp>
  <sparkfaildrop>             0.09 </sparkfaildrop>
  <!-- <bsfc>               18 </bsfc>-->
</piston_engine>
