<?xml version="1.0" encoding="UTF-8"?>

<!-- ########################################

 # DR400-jsbSim by PAF team
 # modified for Ecoflyer by D-ECHO
 # April 2012 : Modified by PAF team
 # http://equipe-flightgear.forumactif.com

##########################################-->

<!--
Diameter: 72.1 in (1.83 m)
Pitch: 56 in
Calculated blade angle: 18° at 75% of the radius
                        the data here is for 17.5 which is more consistant with the data below
Cruise configuration: 51.4 m/s (185 km/h) at 2500 rpm => v/nD = 0.67
Takeoff: 2220 rpm minimum
Max rpm: 2800

Data interpolated from NACA Report 640 : http://naca.central.cranfield.ac.uk/reports/1938/naca-report-640.pdf
-->

<propeller name="prop-mt-mtv6">
  <ixx> 1.677 </ixx>
  <diameter unit="IN"> 75 </diameter>
  <numblades> 3 </numblades>
  <gearratio>1.0</gearratio>
  <table name="C_THRUST" type="internal">
    <tableData>
      0.00	0.1010
      0.10	0.1000
      0.20	0.0980
      0.30	0.0910
      0.40	0.0800
      0.50	0.0660
      0.60	0.0512
      0.65	0.0430
      0.70	0.0360
      0.75	0.0280
      0.80	0.0210
      0.85	0.0120
      0.90	0.0040
      0.95	-0.0050
      1.00	-0.0150
      1.20	-0.0310
      1.50	-0.038
      2.00	-0.045
      3.00	-0.050
    </tableData>
  </table>

  <table name="C_POWER" type="internal">
    <tableData>
      0.00	0.0535
      0.10	0.0534
      0.20	0.0525
      0.30	0.0510
      0.40	0.0485
      0.50	0.0440
      0.60	0.0385
      0.65	0.0343
      0.70	0.0305
      0.75	0.0253
      0.80	0.0208
      0.85	0.0150
      0.90	0.0090
      0.95	-0.0010
      1.00	-0.0070
      1.20	-0.0210
      1.50	-0.0280
      2.00	-0.0300
      3.00	-0.0330
    </tableData>
  </table>

</propeller>
