<?xml version="1.0" encoding="UTF-8"?>
<?xml-stylesheet type="text/xsl" href="http://jsbsim.sourceforge.net/JSBSim.xsl"?>

<!-- ########################################

 # DR400-jsbSim by PAF team
 # April 2012 : Modified by PAF team
 # 2013 - march 2015 : Modified for 180 HP (Daniel Dubreuil)
 # experimental march 2014 : stall and spin, up to flat spin
 # http://equipe-flightgear.forumactif.com

##########################################-->

<fdm_config name="DR400-180" version="2.0" release="BETA"
            xmlns:xsi="http://www.w3.org/2001/XMLSchema-instance"
            xsi:noNamespaceSchemaLocation="http://jsbsim.sourceforge.net/JSBSim.xsd">

  <fileheader>
    <author>Daniel Dubreuil, Guillaume Chauvat</author>
    <filecreationdate> 2007-05-01 </filecreationdate>
    <version> 2016-02-10 </version>
    <description> Robin DR400-180 </description>
  </fileheader>

  <metrics>
    <wingarea  unit="M2">        14.2 </wingarea>
    <wingspan  unit="M" >        8.72 </wingspan>
    <wing_incidence unit="DEG">  2.00 </wing_incidence>
    <chord    unit="M" >         1.56 </chord> <!-- 1.71 m for the rectangular part -->
    <htailarea unit="M2">        2.88 </htailarea>
    <htailarm  unit="M" >        3.75 </htailarm>
    <vtailarea unit="M2">        1.63 </vtailarea>
    <vtailarm  unit="M" >        3.95 </vtailarm>
    <location name="AERORP" unit="M">
      <x>  -1.23 </x> <!-- for CG never behind even if loaded -->
      <y>  0.00 </y>
      <z>  0.00 </z>
    </location>
    <location name="EYEPOINT" unit="M">
      <x>  -1.31 </x>
      <y>  -0.28 </y>
      <z>  0.55 </z>
    </location>
    <location name="VRP" unit="M">
      <x> 0 </x>
      <y> 0 </y>
      <z> 0 </z>
    </location>
  </metrics>

  <mass_balance>
    <ixx unit="KG*M2">      865 </ixx>
    <iyy unit="KG*M2">      1012 </iyy>
    <izz unit="KG*M2">      1731 </izz>
    <ixy unit="KG*M2">        0 </ixy>
    <ixz unit="KG*M2">        0 </ixz>
    <iyz unit="KG*M2">        0 </iyz>
    <emptywt unit="KG" >    620 </emptywt> <!-- DR400-180 Regent -->
    <location name="CG" unit="M">
      <x>  -1.45 </x> <!-- 0.32 m from leading edge for 200 m.kg empty -->
      <y>  0.00 </y>
      <z>  -0.18 </z>
    </location>

    <pointmass name="PILOT" >
      <weight unit="KG">75</weight>
      <location name="POINTMASS" unit="M">
        <x> -1.36 </x>
        <y> -0.28 </y>
        <z>  0.05 </z>
      </location>
    </pointmass>

    <pointmass name="COPILOT">
      <weight unit="KG">70</weight>
      <location name="POINTMASS" unit="M">
        <x> -1.36 </x>
        <y>  0.28 </y>
        <z>  0.05 </z>
      </location>
    </pointmass>

    <pointmass name="LEFT_PASSENGER">
      <weight unit="KG">0</weight>
      <location name="POINTMASS" unit="M">
        <x> -0.58 </x>
        <y> -0.28 </y>
        <z>  0.05 </z>
      </location>
    </pointmass>

    <pointmass name="RIGHT_PASSENGER">
      <weight unit="KG">0</weight>
      <location name="POINTMASS" unit="M">
        <x> -0.58 </x>
        <y>  0.28 </y>
        <z>  0.05 </z>
      </location>
    </pointmass>

    <pointmass name="LUGGAGE">
      <weight unit="KG">5</weight>
      <location name="POINTMASS" unit="M">
        <x>  0.13 </x>
        <y>  0.00 </y>
        <z>  0.10 </z>
      </location>
    </pointmass>

  </mass_balance>

  <ground_reactions>

    <contact type="BOGEY" name="NOSE">
      <location unit="M">
        <x> -2.57 </x>
        <y>  0.00 </y>
        <z> -1.11 </z>
      </location>
      <static_friction>  0.80 </static_friction>
      <dynamic_friction> 0.50 </dynamic_friction>
      <rolling_friction> 0.02 </rolling_friction>
      <spring_coeff unit="N/M">      40000 </spring_coeff>
      <damping_coeff unit="N/M/SEC"> 13000 </damping_coeff>
      <max_steer unit="DEG"> 10.00 </max_steer>
      <brake_group>NONE</brake_group>
      <retractable>0</retractable>
    </contact>

    <contact type="BOGEY" name="LEFT_MAIN">
      <location unit="M">
        <x> -1.02 </x>
        <y> -1.24 </y>
        <z> -1.11 </z>
      </location>
      <static_friction>  0.80 </static_friction>
      <dynamic_friction> 0.50 </dynamic_friction>
      <rolling_friction> 0.02 </rolling_friction>
      <spring_coeff unit="N/M">      65000 </spring_coeff>
      <damping_coeff unit="N/M/SEC"> 24000 </damping_coeff>
      <max_steer unit="DEG">0</max_steer>
      <brake_group>LEFT</brake_group>
      <retractable>0</retractable>
    </contact>

    <contact type="BOGEY" name="RIGHT_MAIN">
      <location unit="M">
        <x> -1.02 </x>
        <y>  1.24 </y>
        <z> -1.11 </z>
      </location>
      <static_friction>  0.80 </static_friction>
      <dynamic_friction> 0.50 </dynamic_friction>
      <rolling_friction> 0.02 </rolling_friction>
      <spring_coeff unit="N/M">      65000 </spring_coeff>
      <damping_coeff unit="N/M/SEC"> 24000 </damping_coeff>
      <max_steer unit="DEG">0</max_steer>
      <brake_group>RIGHT</brake_group>
      <retractable>0</retractable>
    </contact>

    <contact type="STRUCTURE" name="TAIL">
      <location unit="M">
        <x>  2.82 </x>
        <y>  0.00 </y>
        <z> -0.24 </z>
      </location>
      <static_friction>  0.2 </static_friction>
      <dynamic_friction> 0.2 </dynamic_friction>
      <spring_coeff unit="N/M">      190000 </spring_coeff>
      <damping_coeff unit="N/M/SEC">  15000 </damping_coeff>
    </contact>


    <contact type="STRUCTURE" name="LEFT_WING">
      <location unit="M">
        <x> -1.20 </x>
        <y> -4.35 </y>
        <z>  0.00 </z>
      </location>
      <static_friction>  0.2 </static_friction>
      <dynamic_friction> 0.2 </dynamic_friction>
      <spring_coeff unit="N/M">      190000 </spring_coeff>
      <damping_coeff unit="N/M/SEC">  15000 </damping_coeff>
    </contact>

    <contact type="STRUCTURE" name="RIGHT_WING">
      <location unit="M">
        <x> -1.20 </x>
        <y>  4.35 </y>
        <z>  0.00 </z>
      </location>
      <static_friction>  0.2 </static_friction>
      <dynamic_friction> 0.2 </dynamic_friction>
      <spring_coeff unit="N/M">      190000 </spring_coeff>
      <damping_coeff unit="N/M/SEC">  15000 </damping_coeff>
    </contact>

  </ground_reactions>

  <propulsion>

    <engine file="180/Lycoming_O-360-A3A">
      <location unit="M">
        <x>  -2.60 </x>
        <y>  0.00 </y>
        <z>  0.00 </z>
      </location>
      <orient unit="DEG">
        <pitch> 0.00 </pitch>
        <roll>  0.00 </roll>
        <yaw>  0.00 </yaw>
      </orient>
      <feed>0</feed>
      <feed>1</feed>
      <feed>2</feed>
      <thruster file="180/prop76_EM8_S5-0-64">
        <location unit="M">
          <x>  -3.15 </x>
          <y>  0.00 </y>
          <z>  0.00 </z>
        </location>
        <orient unit="DEG">
          <pitch> 0.00 </pitch>
          <roll>  0.00 </roll>
          <yaw>  0.00 </yaw>
        </orient>
      </thruster>
    </engine>

    <tank type="FUEL" number="0"> <!-- left wing -->
      <location unit="M">
        <x>  -1.67 </x> <!-- 0.10 from  leading edge -->
        <y>  -1.24 </y>
        <z>  -0.35 </z>
      </location>
      <capacity unit="KG"> 28.84 </capacity> <!-- 40 L -->
      <contents unit="KG"> 0 </contents>
      <type>AVGAS</type> <!-- 0.721 kg/L -->
    </tank>

    <tank type="FUEL" number="1"> <!-- main -->
      <location unit="M">
        <x>  -0.65 </x> <!-- 1.12 from leading edge -->
        <y>  0.00 </y>
        <z>  -0.35 </z>
      </location>
      <capacity unit="KG"> 79.31 </capacity> <!-- 109 L available on 110 L total-->
      <contents unit="KG"> 79.31 </contents>
      <type>AVGAS</type> <!-- 0.721 kg/L -->
    </tank>

    <tank type="FUEL" number="2"> <!-- right wing -->
      <location unit="M">
        <x>  -1.67 </x>
        <y>  1.24 </y>
        <z>  -0.35 </z>
      </location>
      <capacity unit="KG"> 28.84 </capacity> <!-- 40 L -->
      <contents unit="KG"> 0 </contents>
      <type>AVGAS</type> <!-- 0.721 kg/L -->
    </tank>

  </propulsion>

  <flight_control name="FCS: DR400-180">

    <channel name="Pitch">
      <summer name="Pitch Trim Sum">
        <input>fcs/elevator-cmd-norm</input>
        <input>fcs/pitch-trim-cmd-norm</input>
        <clipto>
          <min> -1 </min>
          <max>  1 </max>
        </clipto>
      </summer>

      <aerosurface_scale name="Elevator Control">
        <input>fcs/pitch-trim-sum</input>
        <range>
          <min> -0.35 </min>
          <max>  0.30 </max>
        </range>
        <output>fcs/elevator-pos-rad</output>
      </aerosurface_scale>

    </channel>

    <channel name="Roll">
      <summer name="Roll Trim Sum">
        <input>fcs/aileron-cmd-norm</input>
        <input>fcs/roll-trim-cmd-norm</input>
        <clipto>
          <min> -1 </min>
          <max>  1 </max>
        </clipto>
      </summer>

      <aerosurface_scale name="Left Aileron Control">
        <input>fcs/roll-trim-sum</input>
        <range>
          <min> -0.35 </min>
          <max>  0.35 </max>
        </range>
        <output>fcs/left-aileron-pos-rad</output>
      </aerosurface_scale>

      <aerosurface_scale name="Right Aileron Control">
        <input>fcs/roll-trim-sum</input>
        <range>
          <min> -0.35 </min>
          <max>  0.35 </max>
        </range>
        <output>fcs/right-aileron-pos-rad</output>
      </aerosurface_scale>

    </channel>

    <channel name="Yaw">
      <summer name="Rudder Command Sum">
        <input>fcs/rudder-cmd-norm</input>
        <input>fcs/yaw-trim-cmd-norm</input>
        <limit>
          <min> -0.35 </min>
          <max>  0.35 </max>
        </limit>
      </summer>

      <aerosurface_scale name="Rudder Control">
        <input>fcs/rudder-command-sum</input>
        <range>
          <min> -0.35 </min>
          <max>  0.35 </max>
        </range>
        <output>fcs/rudder-pos-rad</output>
      </aerosurface_scale>

    </channel>

    <channel name="Flaps">
      <kinematic name="Flaps Control">
        <input>fcs/flap-cmd-norm</input>
        <traverse>
          <setting>
            <position>  0 </position>
            <time>      0 </time>
          </setting>
          <setting>
            <position> 0.25 </position>
            <time>      1.5 </time>
          </setting>
          <setting>
            <position> 1 </position>
            <time>    3 </time>
          </setting>
        </traverse>
        <output>fcs/flap-pos-norm</output>
      </kinematic>

      <aerosurface_scale name="Flap Position degree">
        <input>fcs/flap-pos-norm</input>
        <range>
          <min>0</min>
          <max>60</max>
        </range>
        <output>fcs/flap-pos-deg</output>
      </aerosurface_scale>


    </channel>

    <channel name="Landing Gear">
    </channel>

    <channel name="Speedbrake">
      <kinematic name="Speedbrake Control">
        <input>fcs/speedbrake-cmd-norm</input>
        <traverse>
          <setting>
            <position> 0 </position>
            <time>    0 </time>
          </setting>
          <setting>
            <position> 1 </position>
            <time>    1 </time>
          </setting>
        </traverse>
        <output>fcs/speedbrake-pos-norm</output>
      </kinematic>

    </channel>

  </flight_control>

  <aerodynamics>

  <!-- These angles for alpha. Mind the offset with alpha-wing-rad (wing incidence) -->
  <hysteresis_limits unit="RAD">
      <min>0.15</min>
      <max>0.244</max>
  </hysteresis_limits>

    <function name="aero/function/kCDge">
      <description>Change_in_drag_due_to_ground_effect</description>
      <product>
        <table>
          <independentVar>aero/h_b-mac-ft</independentVar>
          <tableData>
            0.0000   0.0480
            0.1000   0.5150
            0.1500   0.6290
            0.2000   0.7090
            0.3000   0.8150
            0.4000   0.8820
            0.5000   0.9280
            0.6000   0.9620
            0.7000   0.9880
            0.8000   1.0000
            0.9000   1.0000
            1.0000   1.0000
            1.1000   1.0000
          </tableData>
        </table>
      </product>
    </function>

    <function name="aero/function/kCLge">
      <description>Change_in_lift_due_to_ground_effect</description>
      <product>
        <table>
          <independentVar>aero/h_b-mac-ft</independentVar>
          <tableData>
            0.0000   1.2030
            0.1000   1.1270
            0.1500   1.0900
            0.2000   1.0730
            0.3000   1.0460
            0.4000   1.0550
            0.5000   1.0190
            0.6000   1.0130
            0.7000   1.0080
            0.8000   1.0060
            0.9000   1.0030
            1.0000   1.0020
            1.1000   1.0000
          </tableData>
        </table>
      </product>
    </function>

    <axis name="LIFT">

      <function name="aero/coefficient/CLalpha">
        <description>Lift_due_to_alpha</description>
        <product>
          <property>aero/qbar-psf</property>
          <property>metrics/Sw-sqft</property>
          <property>aero/function/kCLge</property>
          <table>
            <independentVar lookup="row">aero/alpha-wing-rad</independentVar>
            <independentVar lookup="column">aero/stall-hyst-norm</independentVar>
            <tableData>
                         0        1
               -0.349   -0.538   -0.538
               -0.314   -0.566   -0.566
               -0.288   -0.627   -0.627
               -0.279   -1.129   -1.129
               -0.271   -1.156   -1.156
               -0.244   -1.084   -1.084
               -0.209   -1.004   -1.004
                0.000    0.09     0.09
                0.070    0.484    0.484
                0.175    1.075    0.75
                0.244    1.406    0.9
                0.262    1.459    0.95
                0.279    1.498    0.98
                0.305    1.522    1.03
                0.314    1.485    1.05
                0.332    1.28     1.1
                0.401    0.60     0.60
                0.524    1.47     1.47
                0.698    1.65     1.65
                0.873    1.47     1.47
                1.047    1.17     1.17
                1.571    0.01     0.01
            </tableData>
          </table>
        </product>
      </function>

      <function name="aero/coefficient/CLDf">
          <description>Delta_lift_due_to_flap_deflection</description>
          <product>
              <property>aero/qbar-psf</property>
              <property>metrics/Sw-sqft</property>
              <property>aero/function/kCLge</property>
                <table>
                <independentVar lookup="row">aero/alpha-wing-rad</independentVar>
                <independentVar lookup="column">fcs/flap-pos-deg</independentVar>
                    <tableData>
                                 0   15      60
                        -0.349   0   0.00    0.00
                        -0.314   0   0.06   -0.15
                        -0.288   0   0.06   -0.14
                        -0.279   0   0.14    0.36
                        -0.271   0   0.16    0.39
                        -0.244   0   0.18    0.46
                        -0.209   0   0.23    0.57
                         0.000   0   0.31    0.68
                         0.070   0   0.32    0.72
                         0.175   0   0.31    0.80
                         0.244   0   0.26    0.64
                         0.262   0   0.24    0.59
                         0.279   0   0.22    0.48
                         0.305   0   0.22    0.08
                         0.314   0   0.21   -0.14
                         0.332   0   0.12   -0.08
                         0.360   0   0.00    0.00
                    </tableData>
                </table>
          </product>
      </function>

      <function name="aero/coefficient/CLde">
        <description>Lift_due_to_Elevator_Deflection</description>
        <product>
          <property>aero/qbar-psf</property>
          <property>metrics/Sh-sqft</property>
          <property>fcs/elevator-pos-rad</property>
          <value>0.2</value>
        </product>
      </function>

    </axis>

    <axis name="DRAG">

      <function name="aero/coefficient/CD0">
        <description>Drag_due_to_alpha</description>
        <product>
          <property>aero/qbar-psf</property>
          <property>metrics/Sw-sqft</property>
          <property>aero/function/kCDge</property>
          <table>
            <independentVar lookup="row">aero/alpha-wing-rad</independentVar>
            <tableData>
              -1.571    1.6000
              -0.349    0.4800
              -0.209    0.0400
              -0.105    0.0355
              -0.052    0.0344
              -0.009    0.0343
               0.018    0.0345
               0.057    0.0350
               0.080    0.0354
               0.096    0.0360
               0.115    0.0367
               0.150    0.0385
               0.209    0.0430
               0.279    0.0540
               0.349    0.4800
               1.571    1.6000
            </tableData>
          </table>
        </product>
      </function>

      <function name="aero/coefficient/CDi">
        <description>Induced_drag</description>
        <product>
          <property>aero/qbar-psf</property>
          <property>metrics/Sw-sqft</property>
          <property>aero/cl-squared</property>
          <value>0.066</value>
        </product>
      </function>

      <function name="aero/coefficient/CDmach">
        <description>Drag_due_to_mach</description>
        <product>
          <property>aero/qbar-psf</property>
          <property>metrics/Sw-sqft</property>
          <table>
            <independentVar lookup="row">velocities/mach</independentVar>
            <tableData>
              0.00      0.000
              0.65      0.000
              1.10      0.023
              1.80      0.015
            </tableData>
          </table>
        </product>
      </function>

      <function name="aero/coefficient/CDflap">
        <description>Drag_due_to_flaps</description>
        <product>
          <property>aero/qbar-psf</property>
          <property>metrics/Sw-sqft</property>
          <property>fcs/flap-pos-deg</property>
          <property>aero/function/kCDge</property>
          <value> 0.00060 </value>
        </product>
      </function>

      <function name="aero/coefficient/CDbeta">
        <description>Drag_due_to_sideslip</description>
        <product>
          <property>aero/qbar-psf</property>
          <property>metrics/Sw-sqft</property>
          <table>
            <independentVar lookup="row">aero/beta-rad</independentVar>
            <tableData>
              -1.57     0.8
              -0.26     0.040
               0.00     0.000
               0.26     0.040
               1.57     0.8
            </tableData>
          </table>
          <value>0.3</value>
        </product>
      </function>

      <function name="aero/coefficient/CDde">
        <description>Drag_due_to_Elevator_Deflection</description>
        <product>
          <property>aero/qbar-psf</property>
          <property>metrics/Sh-sqft</property>
          <abs><property>fcs/elevator-pos-norm</property></abs>
          <value>0.04</value>
        </product>
      </function>

    </axis>

    <axis name="SIDE">

      <function name="aero/coefficient/CYb">
        <description>Side_force_due_to_beta</description>
        <product>
          <property>aero/qbar-psf</property>
          <property>metrics/Sw-sqft</property>
          <property>aero/beta-rad</property>
          <value>-0.5</value>
        </product>
      </function>

    </axis>

    <axis name="ROLL">

      <function name="aero/coefficient/Clb">
        <description>Roll_moment_due_to_beta</description>
        <product>
          <property>aero/qbar-psf</property>
          <property>metrics/Sw-sqft</property>
          <property>metrics/bw-ft</property>
          <property>aero/beta-rad</property>
          <value>-0.025</value>
          <!--
              stall and spin (1):
              via diedra effect.
              Makes the highest (downwind) wing drop at forward slip
              and worsens the spin in a skidding turn.
              But if too great, prevents the spin departure in a slipping turn
          -->
          <table>
            <independentVar lookup="row">aero/alpha-wing-rad</independentVar>
            <tableData>
              0.244     1
              0.262     3.5
            </tableData>
          </table>
        </product>
      </function>

      <function name="aero/coefficient/Clp">
        <description>Roll_moment_due_to_roll_rate (roll damping)</description>
        <product>
          <property>aero/qbar-psf</property>
          <property>metrics/Sw-sqft</property>
          <property>metrics/bw-ft</property>
          <property>aero/bi2vel</property>
          <table>
              <independentVar lookup="row">velocities/p-aero-rad_sec</independentVar>
              <tableData>
                  -20     20
                  -10     9.68
                  -5      2.42
                   0      0
                   5     -2.42
                   10    -9.68
                   20    -20
              </tableData>
          </table>
          <!--
              stall and spin (2):
              less roll damping
          -->
          <table>
            <independentVar lookup="row">aero/alpha-wing-rad</independentVar>
            <tableData>
               0.279    1
               0.297    0.4
            </tableData>
          </table>
        </product>
      </function>

      <function name="aero/coefficient/Clr">
        <description>Roll_moment_due_to_yaw_rate</description>
        <product>
          <property>aero/qbar-psf</property>
          <property>metrics/Sw-sqft</property>
          <property>metrics/bw-ft</property>
          <property>aero/bi2vel</property>
          <property>velocities/r-aero-rad_sec</property>
          <value>0.08</value>
          <!--
              stall and spin (3):
              yaw effect
          -->
          <table>
            <independentVar lookup="row">aero/alpha-wing-rad</independentVar>
            <independentVar lookup="column">velocities/r-aero-rad_sec</independentVar>
            <independentVar lookup="table">aero/stall-hyst-norm</independentVar>
            <tableData breakPoint="0">
                      -0.15  -0.1   0    0.1   0.15
              0.262    1      1     1    1     1
              0.279    4      2     1    2     4
            </tableData>
            <tableData breakPoint="1">
                      -0.15  -0.1   0    0.1   0.15
              0.279    20     10    1    10   20
              0.5      2      2     1    2     2
            </tableData>
          </table>
        </product>
      </function>

      <function name="aero/coefficient/Clda">
        <description>Roll_moment_due_to_aileron</description>
        <product>
          <property>aero/qbar-psf</property>
          <property>metrics/Sw-sqft</property>
          <property>metrics/bw-ft</property>
          <property>fcs/left-aileron-pos-rad</property>
          <value>0.1</value>
          <!--
              stall and spin (4):
              less efficient ailerons
          -->
          <table>
            <independentVar lookup="row">aero/alpha-wing-rad</independentVar>
            <independentVar lookup="column">aero/stall-hyst-norm</independentVar>
            <tableData>
                        0     1
               0.279    1     0.3
               0.297    0.3   0.3
               0.611   -0.1  -0.1
            </tableData>
          </table>
        </product>
      </function>

      <function name="aero/coefficient/Cldr">
        <description>Roll_moment_due_to_rudder</description>
        <product>
          <property>aero/qbar-psf</property>
          <property>metrics/Sw-sqft</property>
          <property>metrics/bw-ft</property>
          <property>fcs/rudder-pos-rad</property>
          <value>0.01</value>
        </product>
      </function>

    </axis>

    <axis name="PITCH">

      <function name="aero/coefficient/Cmo">
        <description>Pitching_moment_at_zero_alpha</description>
        <product>
          <property>aero/qbar-psf</property>
          <property>metrics/Sw-sqft</property>
          <property>metrics/cbarw-ft</property>
          <value>0.18</value>
        </product>
      </function>


      <function name="aero/coefficient/Cmalpha">
        <description>Pitch_moment_due_to_alpha</description>
        <product>
          <property>aero/qbar-psf</property>
          <property>metrics/Sw-sqft</property>
          <property>metrics/cbarw-ft</property>
          <table>
            <independentVar lookup="row">aero/alpha-wing-rad</independentVar>
            <tableData>
              -0.400   0.55
              -0.305   0.58
              -0.285   0.58
               0.285  -0.58
               0.305  -0.58
               0.400  -0.55
            </tableData>
          </table>
          <value>0.7</value>
          <!--
              stall and spin (5):
              horizontal tail stall (for flat spin)
          -->
          <table>
            <independentVar lookup="row">aero/alpha-deg</independentVar>
            <tableData>
               20    1
               25    0.8
               35    0.7
            </tableData>

          </table>
        </product>
      </function>

      <function name="aero/coefficient/Cmde">
        <description>Pitch_moment_due_to_elevator</description>
        <product>
          <property>aero/qbar-psf</property>
          <property>metrics/Sw-sqft</property>
          <property>metrics/cbarw-ft</property>
          <property>fcs/elevator-pos-rad</property>
          <value>-1.8</value>
          <!--
               stall and spin (6):
               elevator loss of efficiency when stalled
          -->
          <table>
            <independentVar lookup="row">aero/alpha-deg</independentVar>
            <tableData>
               18    1
               25    0.5
               35    0.2
               45    0.1
               55    0.1
               65    0.1
               90    0.1
            </tableData>
          </table>
        </product>
      </function>

      <function name="aero/coefficient/Cmflap">
        <description>Pitch_moment_due_to_flaps</description>
        <product>
          <property>aero/qbar-psf</property>
          <property>metrics/Sw-sqft</property>
          <property>metrics/cbarw-ft</property>
          <table>
            <independentVar lookup="row">fcs/flap-pos-deg</independentVar>
            <tableData>
              0    0
              15  -0.060
              60  -0.120
            </tableData>
          </table>
        </product>
      </function>

      <function name="aero/coefficient/Cmq">
        <description>Pitch_moment_due_to_pitch_rate</description>
        <product>
          <property>aero/qbar-psf</property>
          <property>metrics/Sw-sqft</property>
          <property>metrics/cbarw-ft</property>
          <property>aero/ci2vel</property>
          <property>velocities/q-aero-rad_sec</property>
          <value>-12</value>
        </product>
      </function>

      <function name="aero/coefficient/Cmadot">
        <description>Pitch_moment_due_to_alpha_rate</description>
        <product>
          <property>aero/qbar-psf</property>
          <property>metrics/Sw-sqft</property>
          <property>metrics/cbarw-ft</property>
          <property>aero/ci2vel</property>
          <property>aero/alphadot-rad_sec</property>
          <value>-7</value>
        </product>
      </function>

    </axis>

    <axis name="YAW">

      <function name="aero/coefficient/Cnb">
        <description>Yaw_moment_due_to_beta</description>
        <product>
          <property>aero/qbar-psf</property>
          <property>metrics/Sw-sqft</property>
          <property>metrics/bw-ft</property>
          <property>aero/beta-rad</property>
          <value>0.04</value>
        </product>
      </function>

      <!-- <function name="aero/coefficient/Cnpw">
        <description>Yaw_moment_due_to_spiraling_propwash</description>
        <product>
          <property>propulsion/engine/thrust-lbs</property>
          <value>-0.2</value>
        </product>
      </function> -->

      <function name="aero/coefficient/Cnr">
        <description>Yaw_moment_due_to_yaw_rate</description>
        <product>
          <property>aero/qbar-psf</property>
          <property>metrics/Sw-sqft</property>
          <property>metrics/bw-ft</property>
          <property>aero/bi2vel</property>
          <property>velocities/r-aero-rad_sec</property>
          <value>-0.1</value>
        </product>
      </function>

      <function name="aero/coefficient/Cnrf">
          <description>Yaw_moment_due_to_flat_spin</description>
          <!--
              stall and spin (7):
              Feedback loop on yaw rate for flat spin.
              Accelerates the yaw rate when stalled, up to a self-maintained flat spin.
              r-aero-rad_sec with non-zero coefficients mainly sets the max yaw rate, if attained.
              The coefficients set the yaw moment, thus the yaw rate too, and the flatness of the spin.
              Too high coefficients give a non-recoverable flat spin.
              (tricky)
          -->
          <product>
              <property>aero/qbar-psf</property>
              <property>metrics/Sw-sqft</property>
              <property>metrics/bw-ft</property>
              <property>aero/bi2vel</property>
              <table>
                <independentVar lookup="row">velocities/r-aero-rad_sec</independentVar>
                <independentVar lookup="column">aero/alpha-wing-rad</independentVar>
                <tableData>
                        0.279  0.4
                  -15   0      0
                  -5    0      0
                  -4    0     -0.43
                  -1    0      0
                   0    0      0
                   1    0      0
                   4    0      0.43
                   5    0      0
                   15   0      0
                </tableData>
              </table>
          </product>
      </function>

      <function name="aero/coefficient/Cndr">
        <description>Yaw_moment_due_to_rudder</description>
        <product>
          <property>aero/qbar-psf</property>
          <property>metrics/Sw-sqft</property>
          <property>metrics/bw-ft</property>
          <property>fcs/rudder-pos-rad</property>
          <value>-0.04</value>
        </product>
      </function>

      <function name="aero/coefficient/Cnda">
        <description>Adverse_yaw</description>
        <!--
            stall and spin (8):
            adverse yaw: can induce a adverse turn and spin when stalled
        -->
        <product>
          <property>aero/qbar-psf</property>
          <property>metrics/Sw-sqft</property>
          <property>metrics/bw-ft</property>
          <!--
              stall and spin, flat spin
          -->
          <table>
            <independentVar lookup="row">fcs/left-aileron-pos-rad</independentVar>
            <independentVar lookup="column">aero/stall-hyst-norm</independentVar>
            <tableData>
                    0      1
              -1    0.02   0.04
               0    0      0
               1   -0.02  -0.04
            </tableData>
          </table>
        </product>
      </function>

    </axis>

  </aerodynamics>

  <system file="shadow-tweak"/>
  <system file="crash-detect"/>

</fdm_config>
